# Stage 2 — Parallel LJ Ramp (topro / CHARMM36/36m)
# Gradually scales LJ epsilon from 0.001 → 1.0 under nve/limit.
# Run from this relaxation/ directory.

units           real
atom_style      full
boundary        p p p
bond_style      harmonic
angle_style     charmm
dihedral_style  charmm
improper_style  harmonic
pair_style      soft 1.0

fix             cmap all cmap ../charmm36m.cmap
fix_modify      cmap energy yes
read_data       system_after_soft.data fix cmap crossterm CMAP
include         ../protein_network.in.groups

neigh_modify    one 10000
comm_modify     mode single cutoff 14.0

# Pre-minimise under soft potential
pair_style      soft 1.0
pair_coeff      * * 1.0
min_style       cg
minimize        1.0e-4 1.0e-6 1000 10000

# Switch to real LJ/Coul (lj/cut/coul/long supports fix adapt epsilon)
pair_style      lj/cut/coul/long 12.0
kspace_style    pppm 1.0e-4
include         ../protein_network.in.settings
special_bonds   charmm

variable        scale equal ramp(0.001,1.0)
timestep        1.0

thermo          1000
thermo_style    custom step pe ke etotal evdwl ecoul epair ebond eangle edihed eimp press vol temp

fix             1 all adapt 1 pair lj/cut/coul/long epsilon * * v_scale scale yes
fix             fxnve all nve/limit 0.1
run             20000
unfix           fxnve
unfix           1

write_data      system_ramped.data
write_restart   2.restart
