# Stage 2 -- LJ epsilon ramp 0.001 -> 1.0 (topon.protein_network, MARTINI 3).
# Engages MARTINI 3 LJ interactions gradually under nve/limit dynamics.
# Adapted from the topro CHARMM stage 2 protocol; switched from
# lj/charmm/coul/long to MARTINI's lj/cut/coul/cut.
# Run from this relaxation/ directory.

units           real
boundary        p p p
atom_style      full
bond_style      harmonic
angle_style     cosine/squared
dihedral_style  charmm
improper_style  harmonic

pair_style      soft 1.0

read_data       system_after_soft.data
include         ../protein_network.in.groups

neigh_modify    one 10000
comm_modify     mode single cutoff 60.0  # MARTINI bonds + sidechains can stretch under soft potential

# Pre-minimise once more under soft potential
pair_coeff      * * 1.0
min_style       cg
minimize        1.0e-4 1.0e-6 1000 10000

# Switch to MARTINI lj/cut/coul/cut (supports `fix adapt` epsilon scaling)
pair_style      lj/cut/coul/cut 12.0
pair_modify     shift yes
special_bonds   lj 0.0 0.0 0.0 coul 0.0 0.0 0.0
dielectric      15.0
include         ../protein_network.in.settings

variable        scale equal ramp(0.001,1.0)
timestep        1.0

thermo          1000
thermo_style    custom step pe ke etotal evdwl ecoul epair ebond eangle edihed eimp press vol temp

fix             1 all adapt 1 pair lj/cut/coul/cut epsilon * * v_scale scale yes
fix             fxnve all nve/limit 0.1
run             20000
unfix           fxnve
unfix           1

write_data      system_ramped.data
write_restart   2.restart
print           "Stage 2 done -> system_ramped.data"
